// SBML level 3 version 2
// Created with https://github.com/matthiaskoenig/sbmlutils.

model rapamycin_intestine(PODOSE_rap, Ka_dis_rap, Mr_rap, Vext, Vgu, Vlumen, Vfeces, Vstomach, rap_lumen, rx_lumen, rap_entero, rx_entero, rap_ext, rx_feces)
  // Model for rapamycin absorption in the small intestine
  // Model for rapamycin absorption
  // large amount of radioactivity in feces: ~91.0% (mainly rapamycin metabolites)
  // The content of this model has been carefully created in a manual research effort.
  // Terms of use
  // Copyright © 2026 Matthias König.
  // This work is licensed under a Creative Commons Attribution 4.0 International License.
  // Redistribution and use of any part of this model, with or without modification, are permitted provided that the following conditions are met:
  // Redistributions of this SBML file must retain the above copyright notice, this list of conditions and the following disclaimer.
  // Redistributions in a different form must reproduce the above copyright notice, this list of conditions and the following disclaimer in the documentation and/or other materials provided with the distribution.
  // This model is distributed in the hope that it will be useful, but WITHOUT ANY WARRANTY; without even the implied warranty of MERCHANTABILITY or FITNESS FOR A PARTICULAR PURPOSE.
  // hasTaxon taxonomy:9606 snomedct:337915000
  // hasProperty mamo:MAMO_0000046 ncit:C15261 ncit:C15299 ncit:C15342 ncit:C79369
  // ncit:C1212
  // occursIn FMA:45615 BTO:0000545 ncit:C12736 FMA:7199 BTO:0000648
  // model units - substance: mmole, time: min, volume: litre, area: m2, length: metre, extent: mmole

  // Compartments:
  compartment Vext = 1 litre; Vext is "plasma";  // SBO:0000290 ncit:C13356 BTO:0000131
  compartment Vgu = 1.2825 litre; Vgu is "intestine";  // SBO:0000290 FMA:45615 BTO:0000545 ncit:C12736
  compartment Vlumen = 1.15425 litre; Vlumen is "intestinal lumen (inner part of intestine)";  // SBO:0000290 FMA:14586 UBERON:0018543
  compartment Vfeces = 1 litre;  // SBO:0000290 FMA:64183 ncit:C13234 BTO:0000440
  compartment Ventero = 0.12825 litre; Ventero is "intestinal lining (enterocytes)";  // SBO:0000290
  compartment Vapical = NaN; Vapical has m2; Vapical is "apical membrane (intestinal membrane enterocytes)";  // 2-D; SBO:0000290 FMA:84666 GO:0016324
  compartment Vbaso = NaN; Vbaso has m2; Vbaso is "basolateral membrane (intestinal membrane enterocytes)";  // 2-D; SBO:0000290 FMA:84669 GO:0016323
  compartment Vstomach = 1 litre;  // SBO:0000290 FMA:7148 ncit:C12391 UBERON:0000945
  compartment Vint_0; Vint_0 has litre; Vint_0 is "intestinal lumen (inner part of intestine)";  // SBO:0000290 FMA:14586 UBERON:0018543
  compartment Vint_1; Vint_1 has litre; Vint_1 is "intestinal lumen (inner part of intestine)";  // SBO:0000290 FMA:14586 UBERON:0018543
  compartment Vint_2; Vint_2 has litre; Vint_2 is "intestinal lumen (inner part of intestine)";  // SBO:0000290 FMA:14586 UBERON:0018543
  compartment Vint_3; Vint_3 has litre; Vint_3 is "intestinal lumen (inner part of intestine)";  // SBO:0000290 FMA:14586 UBERON:0018543
  compartment Vint_4; Vint_4 has litre; Vint_4 is "intestinal lumen (inner part of intestine)";  // SBO:0000290 FMA:14586 UBERON:0018543

  // Species:
  substanceOnly species $rap_stomach in Vstomach = 0; rap_stomach is "rapamycin (stomach)";  // SBO:0000247 pubchem.compound:5284616 inchikey:QFJCIRLUMZQUOT-HPLJOQBZSA-N CHEBI:9168
  species rap_lumen in Vlumen = 0; rap_lumen is "rapamycin (intestinal volume)";  // SBO:0000247 pubchem.compound:5284616 inchikey:QFJCIRLUMZQUOT-HPLJOQBZSA-N CHEBI:9168
  species rx_lumen in Vlumen = 0; rx_lumen is "rapamycin metabolites (intestinal volume)";  // SBO:0000247
  species rap_entero in Ventero = 0; rap_entero is "rapamycin (enterocytes)";  // SBO:0000247 pubchem.compound:5284616 inchikey:QFJCIRLUMZQUOT-HPLJOQBZSA-N CHEBI:9168
  species rx_entero in Ventero = 0; rx_entero is "rapamycin metabolite (enterocytes)";  // SBO:0000247
  species rap_ext in Vext = 0; rap_ext is "rapamycin (plasma)";  // SBO:0000247 pubchem.compound:5284616 inchikey:QFJCIRLUMZQUOT-HPLJOQBZSA-N CHEBI:9168
  substanceOnly species rx_feces in Vfeces = 0; rx_feces is "rapamycin metabolites (feces)";  // SBO:0000247
  species rx_int_0 in Vint_0 = 0; rx_int_0 is "rapamycin metabolites (intestine) 0";  // SBO:0000247
  species rx_int_1 in Vint_1 = 0; rx_int_1 is "rapamycin metabolites (intestine) 1";  // SBO:0000247
  species rx_int_2 in Vint_2 = 0; rx_int_2 is "rapamycin metabolites (intestine) 2";  // SBO:0000247
  species rx_int_3 in Vint_3 = 0; rx_int_3 is "rapamycin metabolites (intestine) 3";  // SBO:0000247
  species rx_int_4 in Vint_4 = 0; rx_int_4 is "rapamycin metabolites (intestine) 4";  // SBO:0000247

  // Parameters:
  Vchain = 0.1 litre; Vchain is "volume of chain compartment";  // SBO:0000009
  PODOSE_rap = 0 mg; PODOSE_rap is "oral dose rapamycin [mg]";  // SBO:0000002
  Ka_dis_rap = 2 per_hr; Ka_dis_rap is "Ka_dis [1/hr] dissolution rapamycin";  // SBO:0000002
  Mr_rap = 914.1719 g_per_mole; Mr_rap is "Molecular weight rapamycin [g/mole]";  // SBO:0000647
  // Used for drug-drug interactions. f_oatp = 1: normal activity; f_oatp < 1: reduced activity; inhibitor of absorption f_oatp > 1: increased activity; activator of absorption
  f_oatp = 1 dimensionless; f_oatp is "OATP transporter activity";  // SBO:0000009
  RAPIM_k = 0.01070738 per_min; RAPIM_k is "rate of rapamycin import enterocytes";  // SBO:0000009
  RAP2RX_Vmax = 0.00413209 mmole_per_min_l; RAP2RX_Vmax is "Vmax rapamycin metabolism";  // SBO:0000186
  // Michaelis-Menten constant for rapamycin metabolism from in vitro studies.
  // Km value in the range of approximately 1.1μM to 4.7μM for sirolimus. [perplexity]
  // Km: 8.07 +- 2.11 µm [Sattler1992]; human liver microsomes
  RAP2RX_Km_rap = 0.00807 mM; RAP2RX_Km_rap is "Km rapamycin metabolism";  // SBO:0000027
  // Used for drug-drug interactions. f_cyp3a4 = 1: normal activity; f_cyp3a4 < 1: reduced activity; inhibitor of CYP3A4 f_cyp3a4 > 1: increased activity; activator of CYP3A4
  f_cyp3a4 = 1 dimensionless; f_cyp3a4 is "CYP3A4 activity";  // SBO:0000009
  // Used for drug-drug interactions. f_cyp3a5 = 1: normal activity; f_cyp3a5 < 1: reduced activity; inhibitor of CYP3A4 f_cyp3a5 > 1: increased activity; activator of CYP3A4
  f_cyp3a5 = 1 dimensionless; f_cyp3a5 is "CYP3A5 activity";  // SBO:0000009
  // Used for drug-drug interactions. f_pg = 1: normal activity; f_pg < 1: reduced activity; activator of absorption f_pg > 1: increased activity; inhibitor of absorption
  f_pg = 1 dimensionless; f_pg is "P-gp transporter activity";  // SBO:0000009
  RXPG_k = 0.4042523 per_min; RXPG_k is "rate of rapamycin metabolites PG export";  // SBO:0000009
  RXEXC_k = 0.09423226 per_min; RXEXC_k is "rate of rapamycin metabolite fecal excretion";  // SBO:0000009

  // Assignment rules:
  Vint_0 := Vchain;
  Vint_1 := Vchain;
  Vint_2 := Vchain;
  Vint_3 := Vchain;
  Vint_4 := Vchain;

  // Rate rules:
  PODOSE_rap' = -dissolution_rap*Mr_rap;

  // Reactions:
  RAPIM: rap_lumen => rap_entero; f_oatp*RAPIM_k*Vgu*rap_lumen;  // SBO:0000655
  RAPABS: rap_entero => rap_ext; RAPIM_k*Ventero*rap_entero; RAPABS is "absorption rapamycin (plasma)";  // SBO:0000655
  RAP2RX: rap_entero => rx_entero; f_cyp3a4*f_cyp3a5*RAP2RX_Vmax*Ventero*rap_entero/(rap_entero + RAP2RX_Km_rap); RAP2RX is "rapamycin metabolism via CYP3A4/5";  // SBO:0000655
  RXPG: rx_entero => rx_lumen; f_pg*RXPG_k*Ventero*rx_entero;  // SBO:0000655
  RXEXC: rx_lumen => rx_int_0; RXEXC_k*Vgu*rx_lumen; RXEXC is "excretion rapamycin metabolites (feces)";  // SBO:0000655
  RXEXC_0: rx_int_0 => rx_int_1; RXEXC_k*Vint_0*rx_int_0; RXEXC_0 is "excretion rapamycin metabolites 0";  // SBO:0000655
  RXEXC_1: rx_int_1 => rx_int_2; RXEXC_k*Vint_1*rx_int_1; RXEXC_1 is "excretion rapamycin metabolites 1";  // SBO:0000655
  RXEXC_2: rx_int_2 => rx_int_3; RXEXC_k*Vint_2*rx_int_2; RXEXC_2 is "excretion rapamycin metabolites 2";  // SBO:0000655
  RXEXC_3: rx_int_3 => rx_int_4; RXEXC_k*Vint_3*rx_int_3; RXEXC_3 is "excretion rapamycin metabolites 3";  // SBO:0000655
  RXEXC_4: rx_int_4 => rx_feces; RXEXC_k*Vint_4*rx_int_4; RXEXC_4 is "excretion rapamycin metabolites 4";  // SBO:0000655
  // Swallowing, dissolution of tablet, and transport into intestine. Overall process describing the rates of this processes.
  dissolution_rap: $rap_stomach => rap_lumen; Ka_dis_rap/(60 min_per_hr)*PODOSE_rap/Mr_rap; dissolution_rap is "dissolution rapamycin";

  // Unit definitions:
  unit g_per_mole = gram / mole; g_per_mole is "g/mole";
  unit l_per_min = litre / (60 second); l_per_min is "l/min";
  unit m2 = metre^2; m2 is "meter^2";
  unit mM = 1e-3 mole / litre; mM is "mmole/liter";
  unit mg = 1e-3 gram;
  unit mg_per_min = 1e-3 gram / (60 second); mg_per_min is "mg/min";
  unit mg_per_s_l = 1e-3 gram / (second * litre); mg_per_s_l is "mg/s/l";
  unit min = 60 second;
  unit min_per_hr = 60 second / (3600 second); min_per_hr is "min/hour";
  unit mmole = 1e-3 mole;
  unit mmole_per_min = 1e-3 mole / (60 second); mmole_per_min is "mmole/min";
  unit mmole_per_min_l = 1e-3 mole / (60 second * litre); mmole_per_min_l is "mmole/min/l";
  unit per_hr = 1 / (3600 second); per_hr is "1/hr";
  unit per_min = 1 / (60 second); per_min is "1/min";
  unit per_mmole = 1 / (1e-3 mole); per_mmole is "1/mmole";
end
