// SBML level 3 version 2
// Created with https://github.com/matthiaskoenig/sbmlutils.

model rapamycin_liver(Vext, Vli, Vbi, Vlumen, rap_ext, rx_ext, rx_lumen)
  // Model for hepatic rapamycin metabolism.
  // Model for rapamycin metabolism.
  // The content of this model has been carefully created in a manual research effort.
  // Terms of use
  // Copyright © 2026 Matthias König.
  // This work is licensed under a Creative Commons Attribution 4.0 International License.
  // Redistribution and use of any part of this model, with or without modification, are permitted provided that the following conditions are met:
  // Redistributions of this SBML file must retain the above copyright notice, this list of conditions and the following disclaimer.
  // Redistributions in a different form must reproduce the above copyright notice, this list of conditions and the following disclaimer in the documentation and/or other materials provided with the distribution.
  // This model is distributed in the hope that it will be useful, but WITHOUT ANY WARRANTY; without even the implied warranty of MERCHANTABILITY or FITNESS FOR A PARTICULAR PURPOSE.
  // hasTaxon taxonomy:9606 snomedct:337915000
  // hasProperty mamo:MAMO_0000046 ncit:C15261 ncit:C15299 ncit:C15342 ncit:C79371 ncit:C79372
  // ncit:C1212
  // occursIn FMA:7197 BTO:0000759 ncit:C12392
  // model units - substance: mmole, time: min, volume: litre, area: m2, length: metre, extent: mmole

  // Compartments:
  compartment Vext = 1.5 litre; Vext is "plasma";  // SBO:0000290 ncit:C13356 BTO:0000131
  compartment Vli = 1.5 litre; Vli is "liver";  // SBO:0000290 FMA:7197 BTO:0000759 ncit:C12392
  compartment Vmem = NaN; Vmem has m2; Vmem is "plasma membrane";  // 2-D; SBO:0000290 ncit:C13735 FMA:63841 GO:0005886
  compartment Vapical = NaN; Vapical has m2; Vapical is "apical membrane";  // 2-D; SBO:0000290 FMA:84666 GO:0016324
  compartment Vbi = 1 litre; Vbi is "bile";  // SBO:0000290 FMA:62971 ncit:C13192
  compartment Vlumen = 1.15425 litre; Vlumen is "intestinal lumen (inner part of intestine)";  // SBO:0000290 FMA:14586 UBERON:0018543

  // Species:
  species rap_ext in Vext = 0; rap_ext is "rapamycin (plasma)";  // SBO:0000247 pubchem.compound:5284616 inchikey:QFJCIRLUMZQUOT-HPLJOQBZSA-N CHEBI:9168
  species rx_ext in Vext = 0; rx_ext is "rapamycin metabolites (plasma)";  // SBO:0000247
  species rap in Vli = 0; rap is "rapamycin (liver)";  // SBO:0000247 pubchem.compound:5284616 inchikey:QFJCIRLUMZQUOT-HPLJOQBZSA-N CHEBI:9168
  species rx in Vli = 0; rx is "rapamycin metabolites (liver)";  // SBO:0000247
  // Bile rapamycin metabolites in amount.
  substanceOnly species rx_bi in Vbi = 0; rx_bi is "rapamycin metabolites (bile)";  // SBO:0000247
  species rx_lumen in Vlumen = 0; rx_lumen is "rapamycin metabolites (lumen)";  // SBO:0000247

  // Parameters:
  RXBEX_k = 3.270358e-6 per_min; RXBEX_k is "rate for rapamycin metabolites export in bile";  // SBO:0000009
  RAPIM_k = 100 per_min; RAPIM_k is "rate rapamycin import";  // SBO:0000002
  RAP2RX_Vmax = 0.009607182 mmole_per_min_l; RAP2RX_Vmax is "Vmax rapamycin metabolism";  // SBO:0000186
  // Michaelis-Menten constant for rapamycin metabolism from in vitro studies.
  // Km value in the range of approximately 1.1μM to 4.7μM for sirolimus. [perplexity]
  // Km: 8.07 +- 2.11 µm [Sattler1992]; human liver microsomes
  RAP2RX_Km_rap = 0.00807 mM; RAP2RX_Km_rap is "Km rapamycin metabolism";  // SBO:0000027
  // Used for drug-drug interactions. f_cyp3a4 = 1: normal activity; f_cyp3a4 < 1: reduced activity; inhibitor of CYP3A4 f_cyp3a4 > 1: increased activity; activator of CYP3A4
  f_cyp3a4 = 1 dimensionless; f_cyp3a4 is "CYP3A4 activity";  // SBO:0000009
  // Used for drug-drug interactions. f_cyp3a5 = 1: normal activity; f_cyp3a5 < 1: reduced activity; inhibitor of CYP3A4 f_cyp3a5 > 1: increased activity; activator of CYP3A4
  f_cyp3a5 = 1 dimensionless; f_cyp3a5 is "CYP3A5 activity";  // SBO:0000009
  RXEX_k = 100 per_min; RXEX_k is "rate rapamycin metabolites export";  // SBO:0000002

  // Reactions:
  // Assumed to be fast.
  RAPIM: rap_ext -> rap; RAPIM_k*Vli*(rap_ext - rap); RAPIM is "rapamycin import (RAPIM)";  // SBO:0000655
  RAP2RX: rap => rx; f_cyp3a4*f_cyp3a5*RAP2RX_Vmax*Vli*rap/(rap + RAP2RX_Km_rap); RAP2RX is "rapamycin metabolism (CYP3A4/5)";  // SBO:0000176
  // Assumed to be fast.
  RXEX: rx -> rx_ext; RXEX_k*Vli*(rx - rx_ext); RXEX is "rapamycin export (RXEX)";  // SBO:0000655
  RXBEX: rx => rx_bi; RXBEX_k*Vli*rx; RXBEX is "rapamycin metabolites bile export";  // SBO:0000655
  RXEHC: rx_bi => rx_lumen; RXEX; RXEHC is "rapamycin metabolites enterohepatic circulation";  // SBO:0000655

  // Unit definitions:
  unit g_per_mole = gram / mole; g_per_mole is "g/mole";
  unit l_per_min = litre / (60 second); l_per_min is "l/min";
  unit m2 = metre^2; m2 is "meter^2";
  unit mM = 1e-3 mole / litre; mM is "mmole/liter";
  unit mg = 1e-3 gram;
  unit mg_per_s_l = 1e-3 gram / (second * litre); mg_per_s_l is "mg/s/l";
  unit min = 60 second;
  unit min_per_hr = 60 second / (3600 second); min_per_hr is "min/hour";
  unit mmole = 1e-3 mole;
  unit mmole_per_min = 1e-3 mole / (60 second); mmole_per_min is "mmole/min";
  unit mmole_per_min_l = 1e-3 mole / (60 second * litre); mmole_per_min_l is "mmole/min/l";
  unit per_min = 1 / (60 second); per_min is "1/min";
  unit per_mmole = 1 / (1e-3 mole); per_mmole is "1/mmole";
end
